// Standard IEEE 14-Bus Transmission System Test Case
/*
Network data extracted from MatPower Version 7.1.
All per unit values converted to actual values with the formula Z_pu = Z_Ohms/Z_base
where Z_base = (KV_LL)^2/MVA_base
MVA_base = 100MVA
Bus Voltage KV_LL = 1kV (Since VBus Voltages are not mentioned in Common Data Format, Assumed KV_LL = 1kV based on ETAP IEEE14Bus Model)

Susceptance B (in microS) = (B_pu x 10^6)/Z_base
*/
Compile IEEE14BusMaster.dss

! The compile builds the circuit model and sets the voltage bases

! sometimes this model needs more than the default 15 iterations
Set maxiterations=100

! This command solves the base case power flow
Solve


! show voltage    ! sequence voltage magnitudes
! show voltage  LN Nodes   ! Detailed
! show power   ! sequence powers
! show power MVA elem   ! show powers in MVA, element by element
